import Sofa.SofaGL as SG
import Sofa.Core as SC
import Sofa.Simulation as SS
import SofaRuntime
import os
import time
sofa_directory = os.environ["SOFA_ROOT"]
import pygame
from OpenGL.GL import *
from OpenGL.GLU import *
from typing import List
from utils import ImageLoader, create_sofa_window, get_device_orientation, get_score
from controller import ControlCatheter
import config
import pyOpenHaptics.hd as hd
import matplotlib.pyplot as plt

# Directory to the different logos
logo_dir = "logos/kings-logo.png"

# Create the pygame widnow size and flags for debugging and final demo
big_display_size = (1920, 1080)
big_display_center = (big_display_size[0] // 2, big_display_size[1] // 2)
big_position = [0, 0]
small_display_size = (450, 500)
small_position = [1920 - small_display_size[0], 1080 - small_display_size[1]]
small_display_center = (small_position[0] + small_display_size[0] // 2, small_display_size[1] // 2)
deb_flags = pygame.DOUBLEBUF | pygame.OPENGL
flags = pygame.DOUBLEBUF | pygame.OPENGL | pygame.FULLSCREEN
up_down_angle = 0
in_out_zoom = 1
left_right_angle = 0
around_angle = 0
translation = [-1.0, 0.0, 0.0]
init_view = [[1.0, 0.0, 0.0, 0.0], [0.0, 1.0, 0.0, 0.0], [0.0, 0.0, 1.0, 0.0], [0.0, 0.0, 0.0, 1.0]]

def centre_of_mass(mo):
    positions = mo["position"].value
    print(positions.mean(axis=0))

def init_display(node: SC.Node, im_loader: ImageLoader):
    global init_view
    """
    Define the initial window for the pygame rendering

    Args:
        node (SC.Node): Root node for a Sofa simulation scene
    """
    pygame.display.init()
    pygame.display.set_mode(big_display_size, deb_flags)
    pygame.display.set_caption("Colon simulation")
    pygame.mouse.set_visible(True)
    glClearColor(1, 1, 1, 1)

    glClear(GL_COLOR_BUFFER_BIT | GL_DEPTH_BUFFER_BIT)

    create_sofa_window(big_position, big_display_size, node)
    create_sofa_window(small_position, small_display_size, node, True)

    pygame.display.flip()


def simple_render(rootNode: SC.Node, im_loader: ImageLoader, mouse_move: List[int], zoom_mouse: int, change_view: bool):
    global up_down_angle, in_out_zoom, left_right_angle, around_angle, translation
    """
    Get the OpenGL context to render an image of the simulation state

    Args:
        rootNode (SC.Node): Sofa root node
    """
    keypress = pygame.key.get_pressed()

    glClear(GL_COLOR_BUFFER_BIT | GL_DEPTH_BUFFER_BIT)

    glViewport(0, 0, big_display_size[0], big_display_size[1])
    glMatrixMode(GL_PROJECTION)
    glLoadIdentity()
    gluOrtho2D(0, big_display_size[0], big_display_size[1], 1)
    glMatrixMode(GL_MODELVIEW)

    # Draw the logo
    glLoadIdentity()
    glDisable(GL_DEPTH_TEST)
    glEnable(GL_BLEND)
    glBlendFunc(GL_SRC_ALPHA, GL_ONE_MINUS_SRC_ALPHA)

    glEnable(GL_LIGHTING)
    glEnable(GL_DEPTH_TEST)

    glMatrixMode(GL_PROJECTION)
    glLoadIdentity()
    gluPerspective(45, (big_display_size[0] / big_display_size[1]), 0.1, 100.0)
    glMatrixMode(GL_MODELVIEW)
    glLoadIdentity()

    # Get the projection from the Sofa scene
    cameraMVM = rootNode.detailed_camera.getOpenGLModelViewMatrix()
    glMultMatrixf(cameraMVM)
    glMatrixMode(GL_MODELVIEW)
    view_matrix = glGetFloatv(GL_MODELVIEW_MATRIX)

    glPushMatrix()
    # The detailed camera (big viewport) moves as follows:
    #   1. Forward-backward movement
    glTranslatef(8.7, -0.2, 0.25)
    glRotatef(90., 0., 0., 1.)

    glMultMatrixf(view_matrix)
    view_matrix = glGetFloatv(GL_MODELVIEW_MATRIX)

    SG.draw(rootNode)
    glPopMatrix()

    glClear(GL_DEPTH_BUFFER_BIT)
    # glEnable(GL_SCISSOR_TEST)
    # glScissor(small_position[0], small_position[1], small_display_size[0], small_display_size[1])
    # glClearColor(1, 1, 1, 1)
    glViewport(small_position[0], small_position[1], small_display_size[0], small_display_size[1])
    # glColor(1, 1, 1, 1)
    glMatrixMode(GL_PROJECTION)
    glLoadIdentity()
    gluOrtho2D(0, small_display_size[0], small_display_size[1], 1)
    glMatrixMode(GL_MODELVIEW)

    # Draw the logo
    glLoadIdentity()
    glDisable(GL_DEPTH_TEST)
    glEnable(GL_BLEND)
    glBlendFunc(GL_SRC_ALPHA, GL_ONE_MINUS_SRC_ALPHA)


    glEnable(GL_DEPTH_TEST)
    glMatrixMode(GL_PROJECTION)
    glLoadIdentity()
    gluPerspective(45, (small_display_size[0] / small_display_size[1]), 0.1, 100.0)
    glMatrixMode(GL_MODELVIEW)
    glLoadIdentity()

    # Get the projection from the Sofa scene
    cameraMVM = rootNode.global_camera.getOpenGLModelViewMatrix()
    glMultMatrixf(cameraMVM)
    glMatrixMode(GL_MODELVIEW)
    view_matrix = glGetFloatv(GL_MODELVIEW_MATRIX)


    #### Start the camera movement ####
    glPushMatrix()
    # glMultMatrixf(cur_view)
    # glLoadIdentity()

    # Move the object around
    if keypress[pygame.K_w]:
        translation[2] += 0.1
    if keypress[pygame.K_s]:
        translation[2] -= 0.1
    if keypress[pygame.K_d]:
        translation[0] -= 0.1
    if keypress[pygame.K_a]:
        translation[0] += 0.1

    # # Zoom the object with the mouse wheel
    in_out_zoom += zoom_mouse * 0.5
    glTranslatef(in_out_zoom, translation[2], translation[0])

    # Rotate the object from left to right
    left_right_angle += mouse_move[0]*0.05
    glRotatef(left_right_angle, 0.0, 1.0, 0.0)

    # Rotate the object up and down
    up_down_angle -= mouse_move[1]*0.05
    glRotatef(up_down_angle, 0.0, 0.0, 1.0)

    glMultMatrixf(view_matrix)
    view_matrix = glGetFloatv(GL_MODELVIEW_MATRIX)

    SG.draw(rootNode)
    glPopMatrix()

    pygame.display.flip()


def createScene(root: SC.Node):
    """
    This function is necessary to run Sofa from both the runSofa executable and the python interpreter (IDE)

    Args:
        root (SC.Node): Root node for a Sofa simulation scene
    """
    # Register all the common component in the factory.
    SofaRuntime.PluginRepository.addFirstPath(os.path.join(sofa_directory, 'bin'))
    root.addObject("RequiredPlugin", name="Sofa.Component.IO.Mesh")
    root.addObject("RequiredPlugin", name="Sofa.Component.Engine.Transform")
    root.addObject("RequiredPlugin", name="Sofa.Component.LinearSolver.Direct")
    root.addObject("RequiredPlugin", name="Sofa.Component.Mass")
    root.addObject("RequiredPlugin", name="Sofa.Component.ODESolver.Backward")
    root.addObject("RequiredPlugin", name="Sofa.Component.SolidMechanics.Spring")
    root.addObject("RequiredPlugin", name="Sofa.Component.StateContainer")
    root.addObject("RequiredPlugin", name="Sofa.Component.Topology.Container.Constant")
    root.addObject("RequiredPlugin", name="Sofa.Component.Visual")
    root.addObject("RequiredPlugin", name="Sofa.Component.AnimationLoop")
    root.addObject("RequiredPlugin", name="Sofa.GL.Component.Rendering3D")
    root.addObject("RequiredPlugin", name="Sofa.GL.Component.Shader")
    root.addObject("RequiredPlugin", name="Sofa.Component.Mapping.MappedMatrix")
    root.addObject("RequiredPlugin", name="Sofa.Component.Haptics")
    root.addObject("RequiredPlugin", name="Sofa.Component.SceneUtility")
    root.addObject('RequiredPlugin', name='Sofa.Component.LinearSolver.Iterative') # Needed to use components [CGLinearSolver]
    root.addObject("RequiredPlugin", name="Sofa.Component.SolidMechanics.FEM.Elastic")
    root.addObject('RequiredPlugin', name='Sofa.Component.Collision.Detection.Algorithm') # Needed to use components [BVHNarrowPhase,BruteForceBroadPhase,CollisionPipeline]
    root.addObject('RequiredPlugin', name='Sofa.Component.Collision.Detection.Intersection') # Needed to use components [LocalMinDistance]
    root.addObject('RequiredPlugin', name='Sofa.Component.Collision.Geometry') # Needed to use components [SphereCollisionModel]
    root.addObject('RequiredPlugin', name='Sofa.Component.Collision.Response.Contact') # Needed to use components [CollisionResponse]
    root.addObject('RequiredPlugin', name='Sofa.Component.Constraint.Lagrangian.Solver') # Needed to use components [LCPConstraintSolver]
    root.addObject('RequiredPlugin', name='Sofa.Component.Mapping.Linear') # Needed to use components [BarycentricMapping]
    root.addObject('RequiredPlugin', name='Sofa.Component.Constraint.Lagrangian.Correction') # Needed to use components [UncoupledConstraintCorrection]
    root.addObject('RequiredPlugin', name='Sofa.Component.Engine.Select') # Needed to use components [BoxROI]
    root.addObject('RequiredPlugin', name='Sofa.Component.Constraint.Projective') # Needed to use components [FixedConstraint]
    root.addObject('RequiredPlugin', name='Sofa.Component.Topology.Container.Grid') # Needed to use components [SparseGridTopology]
    root.addObject('RequiredPlugin', name='Sofa.Component.Mapping.NonLinear') # Needed to use components [RigidMapping]
    root.addObject('RequiredPlugin', name='Sofa.Component.Topology.Container.Dynamic') # Needed to use components [EdgeSetGeometryAlgorithms,EdgeSetTopologyContainer,EdgeSetTopologyModifier,QuadSetGeometryAlgorithms,QuadSetTopologyContainer,QuadSetTopologyModifier]
    root.addObject('RequiredPlugin', name='Sofa.Component.Topology.Mapping') # Needed to use components [Edge2QuadTopologicalMapping]
    root.addObject("RequiredPlugin", name="Sofa.Component.MechanicalLoad")
    root.addObject("RequiredPlugin", name="SofaPython3")
    root.addObject("RequiredPlugin", name="BeamAdapter")
    root.addObject("RequiredPlugin", name="Geomagic")

    root.addObject("CollisionPipeline", name="pipeline", depth=6, verbose=0)
    root.addObject("CollisionResponse", name="response", response="FrictionContactConstraint")
    root.addObject("BruteForceBroadPhase")
    root.addObject("BVHNarrowPhase")
    root.addObject("LocalMinDistance", name="Proximity", alarmDistance=0.05, contactDistance=0.025)

    root.addObject("LCPConstraintSolver", tolerance=1e-3, maxIt=1e3)
    root.addObject("FreeMotionAnimationLoop")

    root.addObject("VisualStyle", displayFlags="hideCollisionModels showVisualModels hideForceFields hideInteractionForceFields")

    # place light and a camera
    root.addObject("LightManager")
    root.addObject("DirectionalLight", name="spotlight", color=[1, 1, 1, 0.1], direction=[0,-1,0])
    # root.addObject("DirectionalLight", name="light", color=[1, 1., 1., 0.01], direction=[0, 0, -1])
    root.addObject("InteractiveCamera", name="global_camera", position=[10, 0, 0],
                            lookAt=[0,0,0], distance=15,
                            fieldOfView=45, zNear=0.63, zFar=100)

    root.addObject("InteractiveCamera", name="detailed_camera", position=[10.0, 0., 0.],
                   lookAt=[0.1,0.1,0], distance=0,
                   fieldOfView=45, zNear=0.63, zFar=100)

    root.addObject("GeomagicDriver", name="GeomagicDevice", deviceName="Default Device", scale=0.05, drawDevice=0, drawDeviceFrame=0, positionBase=[9.7, 1.0, 0.0], orientationBase=get_device_orientation(),
                   maxInputForceFeedback = 0.5)

    omni = root.addChild("Omni")
    omni.addObject("MechanicalObject", template="Rigid3d", name="DOFs", position="@GeomagicDevice.positionDevice")

    omni_instrument = root.addChild("Instrument")
    omni_instrument.addObject("EulerImplicitSolver", rayleighMass=0.01, rayleighStiffness=0.1)
    omni_instrument.addObject("SparseLDLSolver", template="CompressedRowSparseMatrixMat3x3d")
    omni_instrument.addObject("MechanicalObject", name="instrumentState", template="Rigid3d", position="@../GeomagicDevice.positionBase")
    omni_instrument.addObject("UniformMass", name="mass", totalMass=0.5)
    omni_instrument.addObject("RestShapeSpringsForceField", stiffness=1e10, angularStiffness=1e10, external_rest_shape="@../Omni/DOFs", points=0, external_points=0)
    omni_instrument.addObject("LCPForceFeedback", name="LCPFF", activate=True, forceCoef=7.5e-8, printLog=False)
    # omni_instrument.addObject("SphereCollisionModel", radius=0.05, group=1, contactStiffness=1e2)
    omni_instrument.addObject("LinearSolverConstraintCorrection")

    omni_collision = omni_instrument.addChild("Collision", activated=False)
    omni_collision.addObject("MechanicalObject", template="Vec3d", position="@../../GeomagicDevice.positionBase")
    omni_collision.addObject("SphereCollisionModel", radius=0.0425, group=1)
    omni_collision.addObject("IdentityMapping")

    topoLines_cath = root.addChild('topoLines_cath')
    topoLines_cath.addObject('WireRestShape', template="Rigid3d", printLog=False, name="catheterRestShape", length="20", straightLength="20", spireDiameter="0", spireHeight="0.0", densityOfBeams="40", numEdges="20", numEdgesCollis="20", youngModulus="2.5e5", youngModulusExtremity="2.5e5", radius="@../Proximity.alarmDistance")
    topoLines_cath.addObject('EdgeSetTopologyContainer', name="meshLinesCath")
    topoLines_cath.addObject('EdgeSetTopologyModifier', name="Modifier")
    topoLines_cath.addObject('EdgeSetGeometryAlgorithms', name="GeomAlgo", template="Rigid3d")
    topoLines_cath.addObject('MechanicalObject', template="Rigid3d", name="dofTopo1")

    RefStartingPos = root.addChild('RefStartingPos')
    RefStartingPos.addObject('MechanicalObject', name="ReferencePos", template="Rigid3d", position=[9.7, -1.0, 0.0, 0.0, 0.0, 0.707, 0.707])

    InstrumentCombined = root.addChild('InstrumentCombined')
    InstrumentCombined.addObject('EulerImplicitSolver', rayleighStiffness="0.5", rayleighMass="0.1", printLog=False )
    InstrumentCombined.addObject('BTDLinearSolver')
    InstrumentCombined.addObject('RegularGridTopology', name="meshLinesCombined", nx="100", ny="1", nz="1")
    InstrumentCombined.addObject('MechanicalObject', template="Rigid3d", name="DOFs", rz=90)
    InstrumentCombined.addObject('InterventionalRadiologyController', template="Rigid3d", name="m_ircontroller", printLog=False, xtip="0.1",speed =0.,   step="0.", rotationInstrument="0", controlledInstrument="0", startingPos="@../RefStartingPos/ReferencePos.position", instruments="InterpolCatheter")
    InstrumentCombined.addObject('WireBeamInterpolation', name="InterpolCatheter", WireRestShape="@../topoLines_cath/catheterRestShape", radius="0.05", printLog=False)
    InstrumentCombined.addObject('AdaptiveBeamForceFieldAndMass', name="CatheterForceField", massDensity="10", computeMass=1, interpolation="@InterpolCatheter", printLog=False)
    InstrumentCombined.addObject('LinearSolverConstraintCorrection', printLog=False, wire_optimization="true")
    InstrumentCombined.addObject("FixedConstraint", indices="0")
    InstrumentCombined.addObject('RestShapeSpringsForceField', name="MeasurementFF", points="@m_ircontroller.indexFirstNode",  stiffness="1e10", recompute_indices="1", angularStiffness="1e10", external_rest_shape="@../RefStartingPos/ReferencePos", external_points="0", drawSpring="1", springColor="1 0 0 1")
    InstrumentCombined.addObject("ConstantForceField", name="force", indices=[99], forces=[0., 0., 0., 0., 0., 0.])

    CollisInstrumentCombined = InstrumentCombined.addChild('CollisInstrumentCombined', activated=False)
    CollisInstrumentCombined.addObject('EdgeSetTopologyContainer', name="collisEdgeSet")
    CollisInstrumentCombined.addObject('EdgeSetTopologyModifier', name="colliseEdgeModifier")
    CollisInstrumentCombined.addObject('MechanicalObject', name="CollisionDOFs")
    CollisInstrumentCombined.addObject('MultiAdaptiveBeamMapping', name="multimapp", ircontroller="../m_ircontroller", useCurvAbs="1", printLog="false")
    CollisInstrumentCombined.addObject('LineCollisionModel', group=1)
    CollisInstrumentCombined.addObject('PointCollisionModel', group=1)

    visuInstrumentCombined = InstrumentCombined.addChild('visuInstrumentCombined')
    visuInstrumentCombined.addObject('MechanicalObject', name="Quads")
    visuInstrumentCombined.addObject('QuadSetTopologyContainer', name="ContainerCath")
    visuInstrumentCombined.addObject('QuadSetTopologyModifier', name="Modifier" )
    visuInstrumentCombined.addObject('QuadSetGeometryAlgorithms', name="GeomAlgo", template="Vec3d")
    visuInstrumentCombined.addObject('Edge2QuadTopologicalMapping', nbPointsOnEachCircle="10", radius="@../../Proximity.alarmDistance", input="@../../topoLines_cath/meshLinesCath", output="@ContainerCath", flipNormals="true",printLog=False)
    visuInstrumentCombined.addObject('AdaptiveBeamMapping', name="VisuMapCath", useCurvAbs="1", printLog=False, isMechanical="false",  interpolation="@../InterpolCatheter")


    realVisuInstrumentCombined = visuInstrumentCombined.addChild('realVisuInstrumentCombined')
    realVisuInstrumentCombined.addObject('OglModel',name="VisualCathOGL", src="@../ContainerCath", color='white')
    realVisuInstrumentCombined.addObject('IdentityMapping', input="@../Quads", output="@VisualCathOGL")


    colon = root.addChild("Colon")
    colon.addObject("EulerImplicitSolver", rayleighMass=0.1, rayleighStiffness=0.1)
    colon.addObject("CGLinearSolver", iterations=25, tolerance=1e-10, threshold=1e-10)
    # colon.addObject("MeshOBJLoader", name="loader", filename="mesh/partial-colon-decimate_05.obj")
    colon.addObject("SparseGridTopology", name="sp_grid", n=[6, 6, 12], fileTopology="mesh/partial-colon-decimate_05.obj")
    # colon.addObject("MeshTopology", src="@loader")
    colon.addObject("MechanicalObject", name="colon_dof", topology="@sp_grid", template="Vec3d", rx=-90, ry=30, rz=0, dx=12, dy=1, scale=0.0275)
    colon.addObject("TetrahedronFEMForceField", name="FEM", youngModulus=7e9, poissonRatio=0.45, method="large")
    colon.addObject("UniformMass", name="mass")
    colon.addObject("UncoupledConstraintCorrection", compliance=[2e-7], defaultCompliance=2e-7)
    colon.addObject("BoxROI", name="box", box=[9, 1, 0, 12, 4, 2, 11, -3, 0, 13.5, -0.5, 2], drawBoxes=True)
    colon.addObject("FixedConstraint", name="fixed", indices="@box.indices")
    # colon.addObject("RestShapeSpringsForceField", points="@box.indices", stiffness=1e12, angularStiffness=1e12)
    col_colon = colon.addChild("Collision", activated=True)
    col_colon.addObject("MeshOBJLoader", name="loader", filename="mesh/partial-colon-decimate_05.obj")
    col_colon.addObject("MeshTopology", src="@loader")
    col_colon.addObject("MechanicalObject", name="colon_col", src="@loader", template="Vec3d")# rx=-90, ry=30, rz=0, dx=12, dy=1, scale=0.0275)
    col_colon.addObject("TriangleCollisionModel", group=0)
    col_colon.addObject("LineCollisionModel", group=0)
    col_colon.addObject("PointCollisionModel", group=0)
    col_colon.addObject("BarycentricMapping")
    visu_colon = colon.addChild("Visu")
    visu_colon.addObject("MeshOBJLoader", name="loader", filename="mesh/partial-colon-decimate_05.obj")
    visu_colon.addObject("OglModel", name="Visual", src="@loader", color="1.0 0.1 0.1 1.0")# rx=-90, ry=30, rz=0, dx=12, dy=1, scale=0.0275)
    visu_colon.addObject("BarycentricMapping")


    return root.addObject(ControlCatheter(node=root))


def main():
    im_loader=ImageLoader(10, 10)
    root = SC.Node("root")
    createScene(root)
    SS.init(root)
    init_display(root, im_loader)
    mouse_move = [0, 0]
    zoom_mouse = 0.0
    move_camera = False
    paused = False
    change_view = False
    # clock = pygame.time.Clock()

    pygame.mouse.set_pos(small_display_center)

    while not config.done:
        # clock.tick(60)
        SS.animate(root, root.getDt())
        SS.updateVisual(root)
        if not paused:
            simple_render(root, im_loader, mouse_move, zoom_mouse, move_camera)

        zoom_mouse = 0.0
        for event in pygame.event.get():
            if event.type == pygame.KEYDOWN:
                if event.key == pygame.K_ESCAPE or event.key == pygame.K_RETURN:
                    config.done = True
                if event.key == pygame.K_PAUSE or event.key == pygame.K_p:
                    paused = not paused
                    pygame.mouse.set_pos(small_display_center)
            if not paused:
                if event.type == pygame.MOUSEBUTTONDOWN:
                    if event.button == 1:
                        move_camera = True
                    elif event.button == 3:
                        change_view = not change_view

                elif event.type == pygame.MOUSEBUTTONUP:
                    if event.button == 1:
                        move_camera = False
                if event.type == pygame.MOUSEWHEEL:
                    zoom_mouse = event.y

                if not move_camera:
                    continue

                if event.type == pygame.MOUSEMOTION:
                    mouse_move = [event.pos[i] - small_display_center[i] for i in range(2)]
                    pygame.mouse.set_pos(small_display_center)

        time.sleep(root.getDt())

    # Close the device to avoid segmentation errors
    hd.end_frame(0)
    hd.stop_scheduler()
    hd.close_device(0)

    pygame.quit()

    if len(config.experiment_forces) != 0:
        fig = plt.figure(figsize=(15, 10))
        ax = fig.add_subplot(111)
        ax.boxplot(config.experiment_forces, notch=False)
        plt.title(f"Your force based score is: {get_score(config.experiment_forces)}")
        ax.set_xticklabels([f"Objective {i}" for i in range(len(config.experiment_forces))])
        ax.set_ylabel("Force on the wall (N)")
        plt.show()

if __name__ == "__main__":
    time.sleep(0.4)
    main()
